<neuroml xmlns="http://www.neuroml.org/schema/neuroml2"  xmlns:xs="http://www.w3.org/2001/XMLSchema" xmlns:xsi="http://www.w3.org/2001/XMLSchema-instance" xsi:schemaLocation="http://www.neuroml.org/schema/neuroml2 https://raw.github.com/NeuroML/NeuroML2/development/Schemas/NeuroML2/NeuroML_v2beta5.xsd" id="L23_Stim">
    <notes>

This NeuroML 2 file was generated by OpenCortex v0.1.0 using:
    libNeuroML v0.2.29
    pyNeuroML v0.2.10

    </notes>
    <property tag="Network seed" value="1234"/>
    <include href="L23_NoHotSpot.cell.nml"></include>
    <include href="ca.channel.nml"></include>
    <include href="it.channel.nml"></include>
    <include href="kca.channel.nml"></include>
    <include href="km.channel.nml"></include>
    <include href="kv.channel.nml"></include>
    <include href="na.channel.nml"></include>
    <include href="pas.channel.nml"></include>
    <include href="AMPA.synapse.nml"></include>
    <include href="GABA.synapse.nml"></include>
    <include href="NMDA.synapse.nml"></include>
    <poissonFiringSynapse id="ampa1" averageRate="50 Hz" synapse="AMPA" spikeTarget="./AMPA"/>
    <poissonFiringSynapse id="gaba1" averageRate="50 Hz" synapse="GABA" spikeTarget="./GABA"/>
    <poissonFiringSynapse id="nmda1" averageRate="50 Hz" synapse="NMDA" spikeTarget="./NMDA"/>
    <network id="L23_Stim" type="networkWithTemperature" temperature="35degC">
        <population id="L23_pop" component="L23_NoHotSpot" size="1" type="populationList">
            <instance id="0">
                <location x="0." y="0." z="0."/>
            </instance>
        </population>
        <inputList id="bEsyn_a" population="L23_pop" component="ampa1">
            <input id="0" target="../L23_pop/0/L23_NoHotSpot" destination="synapses" segmentId="2274" fractionAlong="0.579424317864"/>
            <input id="1" target="../L23_pop/0/L23_NoHotSpot" destination="synapses" segmentId="192" fractionAlong="0.0678397013592"/>
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        </inputList>
        <inputList id="bEsyn_n" population="L23_pop" component="nmda1">
            <input id="0" target="../L23_pop/0/L23_NoHotSpot" destination="synapses" segmentId="67" fractionAlong="0.920385902986"/>
            <input id="1" target="../L23_pop/0/L23_NoHotSpot" destination="synapses" segmentId="247" fractionAlong="0.691649186148"/>
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        </inputList>
        <inputList id="bIsyn" population="L23_pop" component="gaba1">
            <input id="0" target="../L23_pop/0/L23_NoHotSpot" destination="synapses" segmentId="1158" fractionAlong="0.765685475598"/>
            <input id="1" target="../L23_pop/0/L23_NoHotSpot" destination="synapses" segmentId="694" fractionAlong="0.501537822509"/>
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        </inputList>
    </network>
</neuroml>
