<?xml version="1.0" encoding="UTF-8"?>
<neuroml xmlns="http://www.neuroml.org/schema/neuroml2" xmlns:xsi="http://www.w3.org/2001/XMLSchema-instance" xsi:schemaLocation="http://www.neuroml.org/schema/neuroml2  https://raw.github.com/NeuroML/NeuroML2/development/Schemas/NeuroML2/NeuroML_v2beta3.xsd" id="net">

    <include href="singleCompPas.cell.nml"/>

    <include href="AMPA.synapse.nml"/>
    <include href="GABA.synapse.nml"/>
    <include href="NMDA.synapse.nml"/>

    <pulseGenerator id="iclamp0" delay="100 ms" duration="10 ms" amplitude="0.2 nA"/>
    <pulseGenerator id="iclamp1" delay="300 ms" duration="10 ms" amplitude="0.2 nA"/>

    <pulseGenerator id="iclamp2" delay="200 ms" duration="500 ms" amplitude="0.06 nA"/>

    <network id="net" type="networkWithTemperature" temperature="35 degC">

        <population id="pop" component="cell" type="populationList" size="4">
            <instance id="0">
                <location x="0" y="0" z="0"/>
            </instance>
            <instance id="1">
                <location x="10" y="0" z="0"/>
            </instance>
            <instance id="2">
                <location x="20" y="0" z="0"/>
            </instance>
            <instance id="3">
                <location x="30" y="0" z="0"/>
            </instance>
        </population>

        <projection id="ampa" presynapticPopulation="pop" postsynapticPopulation="pop" synapse="AMPA">
            <connection id="0" preCellId="../pop/0/cell" postCellId="../pop/1/cell"/>
        </projection>

        <projection id="gaba" presynapticPopulation="pop" postsynapticPopulation="pop" synapse="GABA">
            <connection id="0" preCellId="../pop/0/cell" postCellId="../pop/2/cell"/>
        </projection>

        <projection id="nmda" presynapticPopulation="pop" postsynapticPopulation="pop" synapse="NMDA">
            <connection id="0" preCellId="../pop/0/cell" postCellId="../pop/3/cell"/>
        </projection>

        <inputList id="iclamp0" component="iclamp0" population="pop">
            <input id="0" target="../pop/0/cell" destination="synapses"/>
        </inputList>
        <inputList id="iclamp1" component="iclamp1" population="pop">
            <input id="0" target="../pop/0/cell" destination="synapses"/>
        </inputList>

        <inputList id="iclamp2" component="iclamp2" population="pop">
            <input id="0" target="../pop/1/cell" destination="synapses"/>
            <input id="1" target="../pop/2/cell" destination="synapses"/>
            <input id="2" target="../pop/3/cell" destination="synapses"/>
        </inputList>

    </network>

</neuroml>
